// COMSOL Multiphysics 6.2.0.415 model "axisymmetric.mph"
// Outline of the model tree

Parameters
  Radius = 14[km]  // Radius
  GH = 100
  T = 2500  // Period of oscillation
  N = 100  // N
  A0 = 10[m]  // Peak dip
  As = 1000[m]  // Standard deviation
  G = 9.81  // Gravity

Functions
  an2: Analytic | funcname = f; expr = -A0*exp(-r^2/(2*As^2)); args = r
  an3: Analytic | funcname = H; expr = -(3.366*10^-7 )*r^2 -(8.4983*10^-3 )*r + 186; args = r; fununit = m

Variables
  var1 "Variables 1" on boundaries 2
    u_endpoint = aveop1(u)

Couplings
  aveop1: Average on boundaries 2 | axisym = on

Geometry
  geom1 "Geometry 1" (1D axisymmetric, length unit m)
    i1: Interval | coord = {0, Radius}
    pt1: Point | p = Radius
    fin: Finalize "Form Union"

Physics
  c: CoefficientFormPDE on all domains
    dependent variable u
    EquationForm.form = Automatic
    cfeq1: CoefficientFormPDE (default) | c = G*H(r); f = 0; ea = 1; da = 0; be = -G*H(r)/r
    zflx1: ZeroFluxBoundary "Zero Flux 1" (default)
    init1: init "Initial Values 1" (default) | u = f(r); ut = 0

Mesh
  mesh1 "Mesh 1"
    edg1: Edge on domains 1
      dis1: Distribution on all domains | numelem = N

Studies
  std1 "Study 1"
    param: Parametric "Parametric Sweep" | pname = N; plistarr = 10 20 30 40 50 60 70 80 90 100
    lsqo: LSQOptimization "Parameter Estimation"
      filename = /Users/johnking/Desktop/enme302/ENME302 Assignment 2/hydrograph1D.dat
      columnType = {col1, time, col2, value}
      initval = {10[m], 1000[m]}
      scale = {1, 100}
      lbound = {1e-3, 1e-3}
      ubound = {1e4, 1e4}
      pname = {A0, As}
      opttol = 0.0001
      nsolvemax = 100000
    time: Transient "Time Dependent" | tlist = range(0,50,T); usertol = on
  std2 "Study 2"
    param: Parametric "Parametric Sweep" | pname = As; plistarr = range(1000,100,1500); punit = m
    time: Transient "Time Dependent" | tlist = range(0,10,2500); usertol = on; rtol = 0.001
  std3 "Study 3"
    param: Parametric "Parametric Sweep" | pname = A0; plistarr = range(10,1,15); punit = m
    time: Transient "Time Dependent" | tlist = range(0,10,2500); usertol = on
  std4 "Study 4"
    lsqo: LSQOptimization "Parameter Estimation"
      filename = /Users/johnking/Desktop/enme302/ENME302 Assignment 2/hydrograph1D.dat
      modelExpression = {col1, 1, col2, comp1.aveop1(u)}
      unit = {col1, , col2, m}
      initval = {10[m], 1000[m]}
      scale = {1, 100}
      lbound = {1e-3, 1e-3}
      ubound = {1e3, 1e4}
      pname = {A0, As}
    time: Transient "Time Dependent" | tlist = range(500,T); usertol = on

Solver configurations
  sol1 "Solution 1" (study std1)
    v1: Variables "Dependent Variables 1"
    t1: Time "Time-Dependent Solver 1"
      tlist = range(0,50,T)
      tlistlsq = {0, 10, 20, 30, 40, 50, 60, 70, 80, 90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}
      lsqtimesout = 0.00 10.0 20.0 30.0 40.0 50.0 60.0 70.0 80.0 90.0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
      dDef: Direct
      fc1: FullyCoupled | linsolver = dDef
  sol2 "Parametric Solutions 1" (study std1)
  sol4 "Solution 4" (study std2)
    v1: Variables "Dependent Variables 1"
    t1: Time "Time-Dependent Solver 1" | tlist = range(0,10,2500)
      dDef: Direct
      fc1: FullyCoupled | linsolver = dDef
  sol5 "Parametric Solutions 2" (study std2)
  sol12 "Solution 12" (study std3)
    // same settings as sol4
  sol13 "Parametric Solutions 3" (study std3)
  sol30 "Solution 30" (study std4)
    v1: Variables "Dependent Variables 1"
    t1: Time "Time-Dependent Solver 1"
      tlist = range(500,T)
      tlistlsq = {0, 10, 20, 30, 40, 50, 60, 70, 80, 90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}
      lsqtimesout = 0.00 10.0 20.0 30.0 40.0 50.0 60.0 70.0 80.0 90.0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
      dDef: Direct
      fc1: FullyCoupled | linsolver = dDef
  sol31 "Parametric Solutions 4" (study std4)

Datasets
  dset1: Solution | solution = sol1
  dset2: Solution | solution = sol2
  rev1: Revolve1D "Revolution 1D 1" | data = dset2; startangle = -90; revangle = 225
  rev2: Revolve1D "Revolution 1D 2" | data = dset1; startangle = -90; revangle = 225
  dset3: Solution | solution = sol4
  rev3: Revolve1D "Revolution 1D 3" | data = dset3; startangle = -90; revangle = 225
  dset4: Solution | solution = sol5
  rev4: Revolve1D "Revolution 1D 4" | data = dset4; startangle = -90; revangle = 225
  dset5: Solution | solution = sol12
  dset6: Solution | solution = sol13
  rev5: Revolve1D "Revolution 1D 5" | data = dset6; startangle = -90; revangle = 225
  dset7: Solution | solution = sol30
  dset8: Solution | solution = sol31
  rev6: Revolve1D "Revolution 1D 6" | data = dset8; startangle = -90; revangle = 225

Tables
  tbl2: Table "Objective Table 2"
    N | A0 (m) | As (m) | Objective
    10 | 10 | 1000 | 228.866
    10 | 10.2 | 1000 | 228.866
    10 | 10 | 1020 | 228.866
    10 | 9.8 | 1000 | 228.866
    10 | 10 | 980 | 228.866
    10 | 10.0014 | 1000 | 228.866
    10 | 10 | 1000.14 | 228.866
    10 | 9.99859 | 1000 | 228.866
    10 | 10 | 999.99 | 228.866
    10 | 10.0001 | 1000 | 228.866
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  tbl4: Table "Objective Table 4"
    A0 (m) | As (m) | Objective
    10 | 1000 | 43.7675
    10.2 | 1000 | 43.459
    10 | 1020 | 41.241
    9.8 | 1000 | 42.9355
    10 | 980 | 44.5978
    9.98453 | 1039.94 | 39.0197
    9.98674 | 1059.94 | 36.9259
    10.0396 | 1099.59 | 33.2388
    9.9157 | 1137.62 | 31.8454
    10.2169 | 1163.94 | 29.714
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  tbl6: Table "Accumulated Probe Table 6"
    A0 (m) | As (m) | Time (s)
    9.77305 | 1299.08 | 705
    9.77305 | 1299.08 | 706
    9.77305 | 1299.08 | 707
    9.77305 | 1299.08 | 708
    9.77305 | 1299.08 | 709
    9.77305 | 1299.08 | 710
    9.77305 | 1299.08 | 711
    9.77305 | 1299.08 | 712
    9.77305 | 1299.08 | 713
    9.77305 | 1299.08 | 714
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
Plots
  pg2: PlotGroup2D "Coefficient Form PDE 1" | data = rev1
    surf1: Surface | expr = u
  pg3: PlotGroup1D "Coefficient Form PDE 2" | data = dset1
    lngr1: LineGraph (disabled) on domains 1 | expr = u; xdata = expr; xdataexpr = r
    lngr2: LineGraph on domains 1 | data = dset1; expr = u
  pg4: PlotGroup2D "Coefficient Form PDE 3" | data = rev2
    surf1: Surface | expr = u
  pg5: PlotGroup1D "1D Plot Group 5" | data = dset2
    lngr1: LineGraph on domains 1 | data = dset1; expr = u; xdata = spacevar
    ptgr1: PointGraph on boundaries 2 | expr = u
  pg6: PlotGroup1D "Coefficient Form PDE" | data = dset3
    lngr1: LineGraph on domains 1 | expr = u; xdata = expr; xdataexpr = r
  pg7: PlotGroup2D "Coefficient Form PDE 4" | data = rev3
    surf1: Surface | expr = u
  pg8: PlotGroup1D "Coefficient Form PDE 5" | data = dset4
    ptgr1: PointGraph on boundaries 2 | expr = u
  pg9: PlotGroup2D "Coefficient Form PDE 6" | data = rev4
    surf1: Surface | expr = u
  pg10: PlotGroup1D "Coefficient Form PDE 7" | data = dset6
    ptgr1: PointGraph on boundaries 2 | expr = u; autoplotlabel = on
  pg11: PlotGroup2D "Coefficient Form PDE 8" | data = rev5
    surf1: Surface | expr = u
  pg12: PlotGroup1D "hydrograph" | data = dset2
    ptgr1: PointGraph on boundaries 2 | expr = u
  pg13: PlotGroup1D "Coefficient Form PDE 9" | data = dset8
    lngr1: LineGraph on domains 1 | expr = u; xdata = expr; xdataexpr = r
  pg14: PlotGroup2D "Coefficient Form PDE 10" | data = rev6
    surf1: Surface | expr = u
  pg15: PlotGroup1D "Parameter estimation" | data = dset8; xlabel = Time (s); ylabel = Dependent variable u(1)
    glob1: Global "Dependent variable u (model)"
      expr = opt.glsobj.col2.model
      descr = Dependent variable u (model)
      xdata = expr
      xdataexpr = t
      autoplotlabel = on
    glob2: Global "Dependent variable u (data)"
      expr = opt.glsobj.col2.data
      descr = Dependent variable u (data)
      xdata = expr
      xdataexpr = t
      autoplotlabel = on