// COMSOL Multiphysics 6.2.0.415 model "circular2d.mph"
// Outline of the model tree

Parameters
  GH = 100
  T = 2500
  Radius = 14[km]
  N = 10  // N

Functions
  an1: Analytic | funcname = u_a; expr = sin(pi*x)*sin(pi*y)*cos(pi*t*sqrt(2*GH)); args = {x, y, t}
  an2: Analytic | funcname = h; expr = -(3.666*10e-7)*(x^2+y^2)-(8.4983*10e-3)*sqrt(x^2+y^2)+186; args = {x, y}

Geometry
  geom1 "Geometry 1" (2D, length unit m)
    c1: Circle | r = Radius
    pt1: Point | p = {Radius, }
    sq1: Square | base = center; size = Radius
    ls1: LineSegment
      vertex1 = sq1(1) points 4
      specify2 = coord
      vertex2 = c1(1) points 4
      coord2 = {-Radius*cos(pi/4), Radius*cos(pi/4)}
    ls2: LineSegment
      vertex1 = sq1(1) points 3
      specify2 = coord
      vertex2 = c1(1) points 4
      coord2 = {Radius*cos(pi/4), Radius*cos(pi/4)}
    ls3: LineSegment
      vertex1 = sq1(1) points 1
      specify2 = coord
      vertex2 = c1(1) points 4
      coord2 = {-Radius*cos(pi/4), -Radius*cos(pi/4)}
    ls4: LineSegment
      vertex1 = sq1(1) points 2
      specify2 = coord
      vertex2 = c1(1) points 4
      coord2 = {Radius*cos(pi/4), -Radius*cos(pi/4)}
    pt2: Point
    fin: Finalize "Form Union"
    cmd1: CompositeDomains "Form Composite Domains 1" | input = fin(1) domains 1-3, 5; keepformesh = on
    cmd2: CompositeDomains "Form Composite Domains 2" | input = cmd1(1) domains 2; keepformesh = on

Physics
  c: CoefficientFormPDE on all domains
    dependent variable u
    EquationForm.form = Automatic
    cfeq1: CoefficientFormPDE (default) | c = {GH, 0, 0, GH}; f = 0; ea = 1; da = 0
    zflx1: ZeroFluxBoundary "Zero Flux 1" (default)
    init1: init "Initial Values 1" (default) | u = u_a(x,y,t); ut = d(u_a(x,y,t), t)
    dir1: DirichletBoundary "Dirichlet Boundary Condition 1" on all boundaries | r = 0

Mesh
  mesh1 "Mesh 1"
    size: MeshSizeDefault | hauto = 7
    map1: Map "Mapped 1" on domains 1-5
      dis1: Distribution on boundaries 5-8 | numelem = N; equidistant = on

Studies
  std2 "Study 1"
    param: Parametric "Parametric Sweep" | pname = N; plistarr = 10 20 30 40
    time: Transient "Time Dependent" | tlist = range(0,250, 2*T); usertol = on

Solver configurations
  sol1 "Solution 1" (study std2)
    v1: Variables "Dependent Variables 1"
    t1: Time "Time-Dependent Solver 1" | tlist = range(0,250, 2*T)
      dDef: Direct
      fc1: FullyCoupled | linsolver = dDef
  sol2 "Parametric Solutions 1" (study std2)

Datasets
  dset1: Solution | solution = sol1
  dset2: Solution | solution = sol2

Plots
  pg1: PlotGroup2D "Coefficient Form PDE" | data = dset1
    surf1: Surface | expr = u
  pg2: PlotGroup2D "Coefficient Form PDE 1" | data = dset2
    surf1: Surface | expr = u
  pg3: PlotGroup1D "1D Plot Group 3" | data = dset2
    ptgr1: PointGraph on points 9 | expr = u; unit = 1; xdataexpr = N; autoplotlabel = on