// COMSOL Multiphysics 6.2.0.415 model "manufacturedsolution.mph"
// Outline of the model tree

Parameters
  N = 50  // Number of time steps
  Lx = 1.0[m]  // Length x
  Ly = 1.0[m]  // Length y
  GH = 100[m^2/s^2]  // Fuck knows
  T = 2/sqrt(2*GH)  // Time period

Functions
  an1: Analytic "Source" | funcname = s; expr = 12*GH*(t+1)*(y^2*(x-x^4)+x^2*(y-y^4)); args = {x, y, t}
  an2: Analytic "Manufactured solution 2" | funcname = u_e2; expr = (x-x^4)*(y-y^4)*(1+t); args = {x, y, t}
  an3: Analytic | funcname = u_a; expr = sin(pi*x)*sin(pi*y)*cos(pi*t*sqrt(2*GH)); args = {x, y, t}

Geometry
  geom1 "Geometry 1" (2D, length unit m)
    r1: Rectangle | size = {Lx, Ly}
    pt1: Point | p = {Lx/2, Ly/2}
    fin: Finalize "Form Union"

Physics
  c: CoefficientFormPDE on all domains
    dependent variable u
    EquationForm.form = Automatic
    cfeq1: CoefficientFormPDE (default) | c = {GH, 0, 0, GH}; f = s(x,y,t); ea = 1; da = 0
    zflx1: ZeroFluxBoundary "Zero Flux 1" (default)
    init1: init "Initial Values 1" (default) | u = u_e2(x,y,t); ut = d(u_e2(x,y,t), t)
    dir1: DirichletBoundary "Dirichlet Boundary Condition 1" on boundaries 1-4 | r = 0
  c2: CoefficientFormPDE (disabled) on all domains
    dependent variable u2
    EquationForm.form = Automatic
    cfeq1: CoefficientFormPDE (default) | c = {-GH, 0, 0, -GH}; f = 0; ea = 1; da = 0
    zflx1: ZeroFluxBoundary "Zero Flux 1" (default)
    init1: init "Initial Values 1" (default) | u2 = u_a(x,y,t); u2t = d(u_a(x,y,t), t)
    dir1: DirichletBoundary "Dirichlet Boundary Condition 1" on boundaries 1-4 | r = 0

Mesh
  mesh1 "Mesh 1"
    size: MeshSizeDefault | hmax = 0.067; hmin = 3.0E-4; hcurve = 0.3; hgrad = 1.3
    map1: Map "Mapped 1" on remaining entities
      dis1: Distribution on boundaries 1-4 | numelem = N

Studies
  std1 "Study 1"
    param: Parametric "Parametric Sweep" | pname = N; plistarr = 10 20 30 40 50 60 70 80 90 100
    time: Transient "Time Dependent" | tlist = range(0,0.01, 1); usertol = on; rtol = 0.0001

Solver configurations
  sol1 "Solution 1" (study std1)
    v1: Variables "Dependent Variables 1"
    t1: Time "Time-Dependent Solver 1" | tlist = range(0,0.01, 1)
      dDef: Direct
      fc1: FullyCoupled | linsolver = dDef
  sol2 "Parametric Solutions 1" (study std1)

Datasets
  dset1: Solution | solution = sol1
  dset2: Solution | solution = sol2

Plots
  pg1: PlotGroup2D "Coefficient Form PDE" | data = dset1
    surf1: Surface | expr = u
    con1: Contour | expr = u
  pg2: PlotGroup2D "Coefficient Form PDE 1" | data = dset2
    surf1: Surface | expr = u
  pg3: PlotGroup1D "1D Plot Group 3" | data = dset2
    ptgr1: PointGraph on points 3 | expr = abs(u-u_e2(x,y,t))
  pg4: PlotGroup1D "1D Plot Group 4" | data = dset1
    ptgr1: PointGraph on points 3 | expr = u; unit = 1